// SBML level 3 version 2
// Created with https://github.com/matthiaskoenig/sbmlutils.

model enalapril_intestine(PODOSE_ena, Ka_dis_ena, Mr_ena, Vext, Vgu, Vlumen, Vfeces, Vstomach, ena_lumen, ena_ext, ena_feces)
  // Model for enalapril absorption in the small intestine
  // Model for enalapril absorption
  // 'Using radioactive labelled enalapril in 3 volunteers 56 ± 6 % of a single dose was recovered in urine and 39 ± 5 % in the feces [6], indicating that almost 60% of the administered dose was absorbed. Absorption could be even higher because a proportion of the drug and its metabolites may also be excreted in the bile.'{Ball1987}
  // ~ 60% bioavailability after enalipril maleate in elderly (0.61 ± 0.15) and young subjects (0.62 ± 0.16) {Hockings1986}
  // ~ 45% of dose in urine (3.41 mg enalapril, 3.78 mg enalaprilat) after 20 mg enalapril maleate {Burckhard2015} ~ 60% of dose in urine as enalapril and enalaprilat (~25% enalapril, 35% enalaprilat) {Ishizaki1988} ~ 55% of dose in urine as enalapril and enalaprilat (~25% enalapril, 30% enalaprilat) {Ohnishi1989} ~ 35% of dose in urine as enalapril and enalaprilat (~15% enalapril, 20% enalaprilat) {Shioya1992} ~ 60% of dose in urine with ~40% enalaprilat {Till1984}
  // Terms of use
  // The content of this model has been carefully created in a manual research effort. This file has been created by Matthias König using sbmlutils. For questions contact koenigmx@hu-berlin.de. Copyright © 2024 Matthias König.
  // This work is licensed under a Creative Commons Attribution 4.0 International License.
  // Redistribution and use of any part of this model, with or without modification, are permitted provided that the following conditions are met:
  // Redistributions of this SBML file must retain the above copyright notice, this list of conditions and the following disclaimer.
  // Redistributions in a different form must reproduce the above copyright notice, this list of conditions and the following disclaimer in the documentation and/or other materials provided with the distribution.
  // This model is distributed in the hope that it will be useful, but WITHOUT ANY WARRANTY; without even the implied warranty of MERCHANTABILITY or FITNESS FOR A PARTICULAR PURPOSE.
  // model units - substance: mmole, time: min, volume: litre, area: m2, length: metre, extent: mmole

  // Compartments:
  compartment Vext = 1 litre; Vext is "plasma";  // SBO:0000290 ncit:C13356 BTO:0000131
  compartment Vgu = 1.2825 litre; Vgu is "intestine";  // SBO:0000290 FMA:45615 BTO:0000545 ncit:C12736
  compartment Vlumen = 1.15425 litre; Vlumen is "intestinal lumen (inner part of intestine)";  // SBO:0000290 FMA:14586 UBERON:0018543
  compartment Vfeces = 1 litre;  // SBO:0000290 FMA:64183 ncit:C13234 BTO:0000440
  compartment Ventero = 1 litre; Ventero is "intestinal lining (enterocytes)";  // SBO:0000290
  compartment Vapical = NaN; Vapical has m2; Vapical is "apical membrane (intestinal membrane enterocytes)";  // SBO:0000290 FMA:84666 GO:0016324
  compartment Vbaso = NaN; Vbaso has m2; Vbaso is "basolateral membrane (intestinal membrane enterocytes)";  // SBO:0000290 FMA:84669 GO:0016323
  compartment Vstomach = 1 litre;  // SBO:0000290 FMA:7148 ncit:C12391 UBERON:0000945

  // Species:
  substanceOnly species $ena_stomach in Vstomach = 0; ena_stomach is "enalapril (stomach)";  // SBO:0000247 CHEBI:4784 pubchem.compound:5388962 inchikey:GBXSMTUPTTWBMN-XIRDDKMYSA-N
  species ena_lumen in Vlumen = 0; ena_lumen is "enalapril (intestinal volume)";  // SBO:0000247 CHEBI:4784 pubchem.compound:5388962 inchikey:GBXSMTUPTTWBMN-XIRDDKMYSA-N
  species ena_ext in Vext = 0; ena_ext is "enalapril (plasma)";  // SBO:0000247 CHEBI:4784 pubchem.compound:5388962 inchikey:GBXSMTUPTTWBMN-XIRDDKMYSA-N
  substanceOnly species ena_feces in Vfeces = 0; ena_feces is "enalapril (feces)";  // SBO:0000247 CHEBI:4784 pubchem.compound:5388962 inchikey:GBXSMTUPTTWBMN-XIRDDKMYSA-N

  // Parameters:
  // Fraction absorbed, i.e., only a fraction of the enalapril in the intestinal lumen is absorbed. This parameter determines how much of the enalapril is excreted.
  // F_ena_abs of dose is absorbed. (1-F_ena_abs) is excreted in feces.
  // 'Using radioactive labelled enalapril in 3 volunteers 56 +- 6 % of a single dose was recovered in urine and 39 +- 5 % in the feces [6], indicating that almost 60% of the administered dose was absorbed. Absorption could be even higher because a proportion of the drug and its metabolites may also be excreted in the bile.'{Ball1987}
  F_ena_abs = 0.6 dimensionless; F_ena_abs is "fraction absorbed enalapril";  // SBO:0000002
  ENAABS_k = 0.1 per_min; ENAABS_k is "rate of enalapril absorption";  // SBO:0000009
  PODOSE_ena = 0 mg; PODOSE_ena is "oral dose enalapril [mg]";  // SBO:0000002
  Ka_dis_ena = 2 per_hr; Ka_dis_ena is "Ka_dis [1/hr] dissolution enalapril";  // SBO:0000002
  Mr_ena = 416.5 g_per_mole; Mr_ena is "Molecular weight enalapril [g/mole]";  // SBO:0000647
  absorption has mmole_per_min; absorption is "absorption enalapril";

  // Assignment rules:
  absorption := ENAABS_k*Vgu*ena_lumen;

  // Rate rules:
  PODOSE_ena' = -dissolution_ena*Mr_ena;

  // Reactions:
  ENAABS: ena_lumen => ena_ext; F_ena_abs*absorption; ENAABS is "absorption enalapril";  // SBO:0000655
  ENAEXC: ena_lumen => ena_feces; (1 - F_ena_abs)*absorption; ENAEXC is "excretion enalapril (feces)";  // SBO:0000655
  // Swallowing, dissolution of tablet, and transport into intestine. Overall process describing the rates of this processes.
  dissolution_ena: $ena_stomach => ena_lumen; Ka_dis_ena/(60 min_per_hr)*PODOSE_ena/Mr_ena; dissolution_ena is "dissolution enalapril";

  // Unit definitions:
  unit g_per_mole = gram / mole; g_per_mole is "g/mole";
  unit l_per_min = litre / (60 second); l_per_min is "l/min";
  unit m2 = metre^2; m2 is "meter^2";
  unit mM = 1e-3 mole / litre; mM is "mmole/liter";
  unit mg = 1e-3 gram;
  unit mg_per_min = 1e-3 gram / (60 second); mg_per_min is "mg/min";
  unit mg_per_s_l = 1e-3 gram / (second * litre); mg_per_s_l is "mg/s/l";
  unit min = 60 second;
  unit min_per_hr = 60 second / (3600 second); min_per_hr is "min/hour";
  unit mmole = 1e-3 mole;
  unit mmole_per_min = 1e-3 mole / (60 second); mmole_per_min is "mmole/min";
  unit mmole_per_min_l = 1e-3 mole / (60 second * litre); mmole_per_min_l is "mmole/min/l";
  unit per_hr = 1 / (3600 second); per_hr is "1/hr";
  unit per_min = 1 / (60 second); per_min is "1/min";
  unit per_mmole = 1 / (1e-3 mole); per_mmole is "1/mmole";
end
