// SBML level 3 version 2
// Created with https://github.com/matthiaskoenig/sbmlutils.

model enalapril_kidney(Vext, Vki, Vurine, ena_ext, eat_ext, ena_urine, eat_urine)
  // Model for renal enalapril and enalaprilat excretion.
  // Model for enalapril and enalaprilat excretion. version 3
  // Changelog
  // version 1
  // initial model for demonstration
  // version 2
  // removed enalapril excretion
  // excretion of enalaprilat metabolites
  // version 3
  // added enalapril excretion (major fraction in urine ~20%)
  // removed enalapril metabolites (no report in literature, only enalapril and enalaprilat summing up to total amount)
  // ~ 45% of dose in urine (3.41 mg enalapril, 3.78 mg enalaprilat) after 20 mg enalapril maleate [Burckhard2015] ~ 60% of dose in urine as enalapril and enalaprilat (~25% enalapril, 35% enalaprilat) [Ishizaki1988] ~ 55% of dose in urine as enalapril and enalaprilat (~25% enalapril, 30% enalaprilat) [Ohnishi1989] ~ 35% of dose in urine as enalapril and enalaprilat (~15% enalapril, 20% enalaprilat) [Shioya1992] ~ 60% of dose in urine with ~40% enalaprilat [Till1984]
  // Terms of use
  // The content of this model has been carefully created in a manual research effort. This file has been created by Matthias König using sbmlutils. For questions contact koenigmx@hu-berlin.de. Copyright © 2024 Matthias König.
  // This work is licensed under a Creative Commons Attribution 4.0 International License.
  // Redistribution and use of any part of this model, with or without modification, are permitted provided that the following conditions are met:
  // Redistributions of this SBML file must retain the above copyright notice, this list of conditions and the following disclaimer.
  // Redistributions in a different form must reproduce the above copyright notice, this list of conditions and the following disclaimer in the documentation and/or other materials provided with the distribution.
  // This model is distributed in the hope that it will be useful, but WITHOUT ANY WARRANTY; without even the implied warranty of MERCHANTABILITY or FITNESS FOR A PARTICULAR PURPOSE.
  // model units - substance: mmole, time: min, volume: litre, area: m2, length: metre, extent: mmole

  // Compartments:
  compartment Vext = 1.5 litre; Vext is "plasma";  // SBO:0000290 ncit:C13356 BTO:0000131
  compartment Vki = 0.3 litre; Vki is "kidney";  // SBO:0000290 FMA:7203 BTO:0000671 ncit:C12415
  compartment Vmem = NaN; Vmem has m2; Vmem is "plasma membrane";  // 2-D; SBO:0000290 ncit:C13735 FMA:63841 GO:0005886
  compartment Vurine = 1 litre;  // SBO:0000290 FMA:12274 ncit:C13283 BTO:0001419

  // Species:
  species ena_ext in Vext = 0; ena_ext is "enalapril(plasma)";  // SBO:0000247 CHEBI:4784 pubchem.compound:5388962 inchikey:GBXSMTUPTTWBMN-XIRDDKMYSA-N
  species eat_ext in Vext = 0; eat_ext is "enalaprilat (plasma)";  // SBO:0000247 CHEBI:4786 pubchem.compound:5462501 inchikey:LZFZMUMEGBBDTC-QEJZJMRPSA-N
  substanceOnly species ena_urine in Vurine = 0; ena_urine is "enalapril (urine)";  // SBO:0000247 CHEBI:4784 pubchem.compound:5388962 inchikey:GBXSMTUPTTWBMN-XIRDDKMYSA-N
  substanceOnly species eat_urine in Vurine = 0; eat_urine is "enalaprilat (urine)";  // SBO:0000247 CHEBI:4786 pubchem.compound:5462501 inchikey:LZFZMUMEGBBDTC-QEJZJMRPSA-N

  // Parameters:
  f_renal_function = 1 dimensionless; f_renal_function is "parameter for renal function";  // SBO:0000009
  ENAEX_k = 0.9103204 per_min; ENAEX_k is "rate urinary excretion of enalapril";  // SBO:0000009
  EATEX_k = 0.5279225 per_min; EATEX_k is "rate urinary excretion of enalaprilat";  // SBO:0000009
  ENA_EATEX has mmole_per_min;

  // Assignment rules:
  ENA_EATEX := ENAEX + EATEX;

  // Reactions:
  ENAEX: ena_ext => ena_urine; f_renal_function*ENAEX_k*Vki*ena_ext; ENAEX is "enalapril excretion (ENAEX)";  // SBO:0000655
  EATEX: eat_ext => eat_urine; f_renal_function*EATEX_k*Vki*eat_ext; EATEX is "enalaprilat excretion (EATEX)";  // SBO:0000655

  // Unit definitions:
  unit g_per_mole = gram / mole; g_per_mole is "g/mole";
  unit l_per_min = litre / (60 second); l_per_min is "l/min";
  unit m2 = metre^2; m2 is "meter^2";
  unit mM = 1e-3 mole / litre; mM is "mmole/liter";
  unit mg = 1e-3 gram;
  unit mg_per_s_l = 1e-3 gram / (second * litre); mg_per_s_l is "mg/s/l";
  unit min = 60 second;
  unit min_per_hr = 60 second / (3600 second); min_per_hr is "min/hour";
  unit mmole = 1e-3 mole;
  unit mmole_per_min = 1e-3 mole / (60 second); mmole_per_min is "mmole/min";
  unit mmole_per_min_l = 1e-3 mole / (60 second * litre); mmole_per_min_l is "mmole/min/l";
  unit per_min = 1 / (60 second); per_min is "1/min";
  unit per_mmole = 1 / (1e-3 mole); per_mmole is "1/mmole";
end
