// SBML level 3 version 2
// Created with https://github.com/matthiaskoenig/sbmlutils.

model enalapril_liver(Vext, Vli, ena_ext, eat_ext)
  // Model for hepatic enalapril metabolism.
  // Model for enalapril metabolism. version 1
  // Changelog
  // version 1
  // initial model for demonstration
  // version 2
  // added conversion and export of enalaprilat metabolites
  // Terms of use
  // The content of this model has been carefully created in a manual research effort. This file has been created by Matthias König using sbmlutils. For questions contact koenigmx@hu-berlin.de. Copyright © 2024 Matthias König.
  // This work is licensed under a Creative Commons Attribution 4.0 International License.
  // Redistribution and use of any part of this model, with or without modification, are permitted provided that the following conditions are met:
  // Redistributions of this SBML file must retain the above copyright notice, this list of conditions and the following disclaimer.
  // Redistributions in a different form must reproduce the above copyright notice, this list of conditions and the following disclaimer in the documentation and/or other materials provided with the distribution.
  // This model is distributed in the hope that it will be useful, but WITHOUT ANY WARRANTY; without even the implied warranty of MERCHANTABILITY or FITNESS FOR A PARTICULAR PURPOSE.
  // model units - substance: mmole, time: min, volume: litre, area: m2, length: metre, extent: mmole

  // Compartments:
  compartment Vext = 1.5 litre; Vext is "plasma";  // SBO:0000290 ncit:C13356 BTO:0000131
  compartment Vli = 1.5 litre; Vli is "liver";  // SBO:0000290 FMA:7197 BTO:0000759 ncit:C12392
  compartment Vmem = NaN; Vmem has m2; Vmem is "plasma membrane";  // 2-D; SBO:0000290 ncit:C13735 FMA:63841 GO:0005886

  // Species:
  species ena_ext in Vext = 0; ena_ext is "enalapril (plasma)";  // SBO:0000247 CHEBI:4784 pubchem.compound:5388962 inchikey:GBXSMTUPTTWBMN-XIRDDKMYSA-N
  species eat_ext in Vext = 0; eat_ext is "enalaprilat (plasma)";  // SBO:0000247 CHEBI:4786 pubchem.compound:5462501 inchikey:LZFZMUMEGBBDTC-QEJZJMRPSA-N
  species ena in Vli = 0; ena is "enalapril (liver)";  // SBO:0000247 CHEBI:4784 pubchem.compound:5388962 inchikey:GBXSMTUPTTWBMN-XIRDDKMYSA-N
  species eat in Vli = 0; eat is "enalaprilat (liver)";  // SBO:0000247 CHEBI:4786 pubchem.compound:5462501 inchikey:LZFZMUMEGBBDTC-QEJZJMRPSA-N

  // Parameters:
  ENAIM_Vmax = 0.7484466 mmole_per_min_l; ENAIM_Vmax is "Vmax enalapril import";  // SBO:0000186
  // Km = 262 ± 35 µM OATP1B1 [Liu2006] Km = 844 ± 430 µM OATP1B1 [Ni2020] Km = 286.4 ± 84.3 µM OATP2B1 [Ni2020]
  ENAIM_Km_ena = 0.844 mM; ENAIM_Km_ena is "Km enalapril import";  // SBO:0000027
  ENA2EAT_Vmax = 0.6403051 mmole_per_min_l; ENA2EAT_Vmax is "Vmax enalapril conversion";  // SBO:0000186
  // [Thomsen2014]
  ENA2EAT_Km_ena = 1.721 mM; ENA2EAT_Km_ena is "Km enalapril CES1";  // SBO:0000027
  // substrate inhibition [Thomsen2014]
  ENA2EAT_Ki_ena = 2.956 mM; ENA2EAT_Ki_ena is "Ki enalapril CES1";  // SBO:0000261
  // Scaling factor to vary CES1 activity. 1.0: unchanged activity; < 1.0 decreased activity; >1.0 increased activity.
  f_ces1 = 1 dimensionless; f_ces1 is "scaling factor CES1 activity";  // SBO:0000002
  EATEX_Vmax = 0.001480446 mmole_per_min_l; EATEX_Vmax is "Vmax enalaprilat export";  // SBO:0000186
  EATEX_Km_eat = 0.4304253 mM; EATEX_Km_eat is "Km enalaprilat export";  // SBO:0000027

  // Reactions:
  // Entrance of enalapril in the hepatocyte mediated by the organic anion transporting polypeptides (OATP) 1B1 [Smeets2020] Low affinity for OATP1B3 [Liu2006]
  ENAIM: ena_ext -> ena; ENAIM_Vmax/ENAIM_Km_ena*Vli*(ena_ext - ena)/(1 + ena_ext/ENAIM_Km_ena + ena/ENAIM_Km_ena); ENAIM is "enalapril import (ENAIM) OTP1B1";  // SBO:0000655
  // Catalyzed via liver carboxylesterase 1 (CES1); Catalyzed via CES1 not CES2 [Thomsen2014] Enalapril demonstrated substrate inhibition kinetics. Intrinsic clearances were 1.061, 0.360, and 0.02 ml/min/mg protein for ramipril, trandolapril, and enalapril, respectively. [Thomsen2014]
  ENA2EAT: ena => eat; f_ces1*ENA2EAT_Vmax*Vli*ena/(ena + ENA2EAT_Km_ena + ena^2/ENA2EAT_Ki_ena); ENA2EAT is "enalapril conversion (ENA2EAT) CES1";  // SBO:0000176
  EATEX: eat -> eat_ext; EATEX_Vmax/EATEX_Km_eat*Vli*(eat - eat_ext)/(1 + eat_ext/EATEX_Km_eat + eat/EATEX_Km_eat); EATEX is "enalaprilat export (RALEX)";  // SBO:0000655

  // Unit definitions:
  unit g_per_mole = gram / mole; g_per_mole is "g/mole";
  unit l_per_min = litre / (60 second); l_per_min is "l/min";
  unit m2 = metre^2; m2 is "meter^2";
  unit mM = 1e-3 mole / litre; mM is "mmole/liter";
  unit mg = 1e-3 gram;
  unit mg_per_s_l = 1e-3 gram / (second * litre); mg_per_s_l is "mg/s/l";
  unit min = 60 second;
  unit min_per_hr = 60 second / (3600 second); min_per_hr is "min/hour";
  unit mmole = 1e-3 mole;
  unit mmole_per_min = 1e-3 mole / (60 second); mmole_per_min is "mmole/min";
  unit mmole_per_min_l = 1e-3 mole / (60 second * litre); mmole_per_min_l is "mmole/min/l";
  unit per_min = 1 / (60 second); per_min is "1/min";
  unit per_mmole = 1 / (1e-3 mole); per_mmole is "1/mmole";
end
